# Проектная работа: Великие и ужасные законы Кеплера
# PS: Первы закон Кеплера: Орбита КО имеет эллиптическую форму с Солнцем в качестве одного из фокусов.
# r - расстояние от КО до солнца
# ϕ - угол, на который повернут КО
# ecc - эксцентриситет орбиты(эллипса)
# p-перпендикуляр от фокуса до кривой
x0 := 0
y0 := 0
p := 2
ϕ := -π, -π + π/100 .. π
ecc := 0.017
r(ϕ) := (1 - e^2)/(1 + ecc*cos(ϕ))  # Эксцентриситет Марса
υ := 0 .. 1
x(ϕ) := r(ϕ)*cos(ϕ)
# Второй закон Кеплера: Каждая планета движется в плоскости, проходящей через центр Солнца, причём за равные промежутки времени радиус-вектор, соединяющий Солнце и планету, описывает собой равные площади.
#
# PS: перигелий — ближайшая к Солнцу точка орбиты, и афелий — наиболее удалённая точка орбиты. Таким образом, из второго закона Кеплера следует, что планета движется вокруг Солнца неравномерно, имея в перигелии большую линейную скорость, чем в афелии.
y(ϕ) := r(ϕ)*sin(ϕ)  # p = 2b^2/a
a := p/(2*(1 - ecc^2))
a = 1.00029
K := 0.01720209895
ν1(t) :=
    n ← K*a^(-3/2)
    M ← n*t
    E ← M
    E ← root(E - ecc*sin(E) - M, E)
    E + 2*atan(ecc*sin(E)/(1 + sqrt(1 - ecc^2) - ecc*cos(E)))
# K - Гауссовская гравитационная постоянная для солнца
# a - большая полуось эллипса
# T - период вращения КО
# ν1 - истинная аномалия (угол между направлениями на перигей и на КО, отсчитываемый в сторону движения КО)
# m -
T := 2*π/K*a^(3/2)
m := T/50
T/365.25 = 1.00045  # < - Юлианских лет
R := 2
x1(x0, t) := x0 + R*cos(t)
y1(y0, t) := y0 + R*sin(t)
t := 0, 0.1 .. 2*π
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n := 3
r := 1
dt := 0.1
dθ := 0.1
R := n
rr := r/R
θ := dθ*FRAME
Rr := 1 + rr
s := 0, dθ .. θ
ϕ := 0, dt .. 2*π*n
# Орбита КО
x_new(t) := R*cos(t)
y_new(t) := R*sin(t)
d := 1
t := 0, 0.01 .. 2*π
qx(t) := -(R + r)/sqrt(2)*sin(rr*t)
qy(t) := (R + r)/sqrt(2)*cos(rr*t)
mx(t) := qx(t) + d*sin(Rr*t)
my(t) := qy(t) - d*cos(Rr*t)
kx(t) := qx(θ) + cos(t)
ky(t) := qy(θ) + sin(t)
OK := [0, 0; qx(θ), qy(θ)]
QM := [qx(θ), qy(θ); mx(θ), my(θ)]
y0 := -R - 2*r - d
h := 0.1
T := transpose([-R, R, R, -R, -R; y0 - h, y0 - h, y0 + h, y0 + h, y0 - h])
MaxFrame := ceil(2*n*π/dθ) - 1
θx := (θ/(n*π) - 1)*R
θy := y0
OΘ := [-R, θy; θx, θy]
xm := mx(θ)
ym := my(θ)
Max := R + 2*(r + d)
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